OpenVSP model (file version 5), 14 components.
Geometry view with OpenVSP parameter names; values to 6 digits, angles in degrees, lengths in the model's unit.
Overall bounding box: X_Min=0 X_Len=15.193 Y_Min=-10 Y_Len=20 Z_Min=-1.25 Z_Len=3.25

Fuselage "FuselageGeom"
  location (X Y Z) 0 0 0, rotation 0 0 0
  bounding box size 15 3.00017 2.5
  Design: Length=15
  cross sections:
    n  XLocPercent  YLocPercent  ZLocPercent  shape
    0  0            0            -0.05        point
    1  0.25         0            0            super ellipse Super_Height=2.5 Super_M=2.5 Super_MaxWidthLoc=-0.5 Super_N=2.5 Super_Width=3
    2  0.5          0            0            as above
    3  0.75         0            0            as above
    4  1            0            0.05         point

Custom "Duct", child of "FuselageGeom"
  location (X Y Z) 5 5 1.5, rotation 0 90 0
  bounding box size 6.48732 6.40008 1
  Design: Camber=0 CamberLoc=0.2 Chord=1 Height=6.2 InvertFlag=0 Shape=0 ThickChord=0.2 Width=6.2
  custom script Duct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

Propeller "PropGeom", child of "Duct"
  location (X Y Z) 5 5 1.75, rotation 0 90 0; relative location -0.25 0 0, rotation 0 0 0
  bounding box size 6.01081 6.01081 0.298182
  Design: Diameter=6 NumBlade=4 Beta34=20 UseBeta34Flag=1 Feather=0 Rotate=0 Precone=0 ReverseFlag=0 FoldAngle=0 PropMode=0 AF=151.538 CLi=0.538798 Chord=0.177656 Solidity=0.226199 ConstructXoC=0.5 FeatherAxisXoC=0.5 FeatherOffsetXoC=0
  cross sections:
    n  RadiusFrac  shape
    0  0.2         ellipse Ellipse_Height=0.12 Ellipse_Width=0.24
    1  0.4         NACA 16-series Chord=0.49875 IdealCl=0.7 ThickChord=0.144074
    2  1           NACA 16-series Chord=0.39 IdealCl=0.2 ThickChord=0.03
  Chord along r/R (cubic Bezier): 0.2: 0.08, 0.333333: 0.15, 0.466667: 0.2, 0.6: 0.2, 0.716667: 0.2, 0.833333: 0.2, 0.95: 0.2, 0.966667: 0.2, 0.983333: 0.2, 1: 0.13
  Twist along r/R (PCHIP): 0.2: 46.75, 0.75: 20, 1: 13
  Thick along r/R (cubic Bezier): 0.2: 0.5, 0.233333: 0.3, 0.266667: 0.225, 0.3: 0.2, 0.4: 0.125, 0.5: 0.115, 0.6: 0.1, 0.733333: 0.075, 0.866667: 0.055, 1: 0.03
  CLI along r/R (cubic Bezier): 0.2: 0, 0.266667: 0.7, 0.333333: 0.7, 0.4: 0.7, 0.466667: 0.7, 0.533333: 0.7, 0.6: 0.7, 0.733333: 0.7, 0.866667: 0.7, 1: 0.2

Propeller "PropGeom", child of "Duct"
  location (X Y Z) 5 5 1.25, rotation 0 90 0; relative location 0.25 0 0, rotation 0 0 0
  bounding box size 4.54425 4.54425 0.298182
  Design: Diameter=6 NumBlade=4 Beta34=20 UseBeta34Flag=1 Feather=0 Rotate=45 Precone=0 ReverseFlag=1 FoldAngle=0 PropMode=0 AF=151.538 CLi=0.538798 Chord=0.177656 Solidity=0.226199 ConstructXoC=0.5 FeatherAxisXoC=0.5 FeatherOffsetXoC=0
  cross sections:
    n  RadiusFrac  shape
    0  0.2         ellipse Ellipse_Height=0.12 Ellipse_Width=0.24
    1  0.4         NACA 16-series Chord=0.49875 IdealCl=0.7 ThickChord=0.144074
    2  1           NACA 16-series Chord=0.39 IdealCl=0.2 ThickChord=0.03
  blade curves as in "PropGeom"

Custom "Duct", child of "FuselageGeom"
  location (X Y Z) 12 5 1.5, rotation 0 90 0
  bounding box size 6.38595 6.30008 1
  Design: Camber=0 CamberLoc=0.2 Chord=1 Height=6.1 InvertFlag=0 Shape=0 ThickChord=0.2 Width=6.1
  custom script Duct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

Propeller "PropGeom", child of "Duct"
  location (X Y Z) 12 5 1.75, rotation 0 90 0; relative location -0.25 0 0, rotation 0 0 0
  bounding box size 6.01081 6.01081 0.298182
  Design: Diameter=6 NumBlade=4 Beta34=20 UseBeta34Flag=1 Feather=0 Rotate=0 Precone=0 ReverseFlag=1 FoldAngle=0 PropMode=0 AF=151.538 CLi=0.538798 Chord=0.177656 Solidity=0.226199 ConstructXoC=0.5 FeatherAxisXoC=0.5 FeatherOffsetXoC=0
  cross sections:
    n  RadiusFrac  shape
    0  0.2         ellipse Ellipse_Height=0.12 Ellipse_Width=0.24
    1  0.4         NACA 16-series Chord=0.49875 IdealCl=0.7 ThickChord=0.144074
    2  1           NACA 16-series Chord=0.39 IdealCl=0.2 ThickChord=0.03
  blade curves as in "PropGeom"

Propeller "PropGeom", child of "Duct"
  location (X Y Z) 12 5 1.25, rotation 0 90 0; relative location 0.25 0 0, rotation 0 0 0
  bounding box size 4.54425 4.54425 0.298182
  Design: Diameter=6 NumBlade=4 Beta34=20 UseBeta34Flag=1 Feather=0 Rotate=45 Precone=0 ReverseFlag=0 FoldAngle=0 PropMode=0 AF=151.538 CLi=0.538798 Chord=0.177656 Solidity=0.226199 ConstructXoC=0.5 FeatherAxisXoC=0.5 FeatherOffsetXoC=0
  cross sections:
    n  RadiusFrac  shape
    0  0.2         ellipse Ellipse_Height=0.12 Ellipse_Width=0.24
    1  0.4         NACA 16-series Chord=0.49875 IdealCl=0.7 ThickChord=0.144074
    2  1           NACA 16-series Chord=0.39 IdealCl=0.2 ThickChord=0.03
  blade curves as in "PropGeom"

Custom "Duct", child of "FuselageGeom"
  location (X Y Z) 5 -5 1.5, rotation 0 90 0
  bounding box size 6.38595 6.30008 1
  Design: Camber=0 CamberLoc=0.2 Chord=1 Height=6.1 InvertFlag=0 Shape=0 ThickChord=0.2 Width=6.1
  custom script Duct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

Propeller "PropGeom", child of "Duct"
  location (X Y Z) 5 -5 1.75, rotation 0 90 0; relative location -0.25 0 0, rotation 0 0 0
  bounding box size 6.01081 6.01081 0.298182
  Design: Diameter=6 NumBlade=4 Beta34=20 UseBeta34Flag=1 Feather=0 Rotate=0 Precone=0 ReverseFlag=1 FoldAngle=0 PropMode=0 AF=151.538 CLi=0.538798 Chord=0.177656 Solidity=0.226199 ConstructXoC=0.5 FeatherAxisXoC=0.5 FeatherOffsetXoC=0
  cross sections:
    n  RadiusFrac  shape
    0  0.2         ellipse Ellipse_Height=0.12 Ellipse_Width=0.24
    1  0.4         NACA 16-series Chord=0.49875 IdealCl=0.7 ThickChord=0.144074
    2  1           NACA 16-series Chord=0.39 IdealCl=0.2 ThickChord=0.03
  blade curves as in "PropGeom"

Propeller "PropGeom", child of "Duct"
  location (X Y Z) 5 -5 1.25, rotation 0 90 0; relative location 0.25 0 0, rotation 0 0 0
  bounding box size 4.54425 4.54425 0.298182
  Design: Diameter=6 NumBlade=4 Beta34=20 UseBeta34Flag=1 Feather=0 Rotate=45 Precone=0 ReverseFlag=0 FoldAngle=0 PropMode=0 AF=151.538 CLi=0.538798 Chord=0.177656 Solidity=0.226199 ConstructXoC=0.5 FeatherAxisXoC=0.5 FeatherOffsetXoC=0
  cross sections:
    n  RadiusFrac  shape
    0  0.2         ellipse Ellipse_Height=0.12 Ellipse_Width=0.24
    1  0.4         NACA 16-series Chord=0.49875 IdealCl=0.7 ThickChord=0.144074
    2  1           NACA 16-series Chord=0.39 IdealCl=0.2 ThickChord=0.03
  blade curves as in "PropGeom"

Custom "Duct", child of "FuselageGeom"
  location (X Y Z) 12 -5 1.5, rotation 0 90 0
  bounding box size 6.38595 6.30008 1
  Design: Camber=0 CamberLoc=0.2 Chord=1 Height=6.1 InvertFlag=0 Shape=0 ThickChord=0.2 Width=6.1
  custom script Duct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

Propeller "PropGeom", child of "Duct"
  location (X Y Z) 12 -5 1.25, rotation 0 90 0; relative location 0.25 0 0, rotation 0 0 0
  bounding box size 6.01081 6.01081 0.298182
  Design: Diameter=6 NumBlade=4 Beta34=20 UseBeta34Flag=1 Feather=0 Rotate=0 Precone=0 ReverseFlag=0 FoldAngle=0 PropMode=0 AF=151.538 CLi=0.538798 Chord=0.177656 Solidity=0.226199 ConstructXoC=0.5 FeatherAxisXoC=0.5 FeatherOffsetXoC=0
  cross sections:
    n  RadiusFrac  shape
    0  0.2         ellipse Ellipse_Height=0.12 Ellipse_Width=0.24
    1  0.4         NACA 16-series Chord=0.49875 IdealCl=0.7 ThickChord=0.144074
    2  1           NACA 16-series Chord=0.39 IdealCl=0.2 ThickChord=0.03
  blade curves as in "PropGeom"

Propeller "PropGeom", child of "Duct"
  location (X Y Z) 12 -5 1.75, rotation 0 90 0; relative location -0.25 0 0, rotation 0 0 0
  bounding box size 4.54425 4.54425 0.298182
  Design: Diameter=6 NumBlade=4 Beta34=20 UseBeta34Flag=1 Feather=0 Rotate=45 Precone=0 ReverseFlag=1 FoldAngle=0 PropMode=0 AF=151.538 CLi=0.538798 Chord=0.177656 Solidity=0.226199 ConstructXoC=0.5 FeatherAxisXoC=0.5 FeatherOffsetXoC=0
  cross sections:
    n  RadiusFrac  shape
    0  0.2         ellipse Ellipse_Height=0.12 Ellipse_Width=0.24
    1  0.4         NACA 16-series Chord=0.49875 IdealCl=0.7 ThickChord=0.144074
    2  1           NACA 16-series Chord=0.39 IdealCl=0.2 ThickChord=0.03
  blade curves as in "PropGeom"

Wing "WingGeom", child of "FuselageGeom"
  location (X Y Z) 1.9 0 1.5, rotation 0 0 0
  symmetric about XZ
  bounding box size 8 20 0.800464
  totals: TotalSpan=20 TotalProjectedSpan=20 TotalChord=5 TotalArea=100 TotalAR=4
  root: chord 8, twist 0, NACA 4-series Camber=0 CamberLoc=0.2 ThickChord=0.1
  sections:
    n  Span  Root_Chord  Tip_Chord  Area  Sweep  Sweep_Location  Dihedral  Twist  Twist_Location  tip airfoil
    1  10    8           2          50    30     0               0         0      0.25            as above

Advanced link "Unnamed_Link"
