OpenVSP model (file version 5), 28 components.
Geometry view with OpenVSP parameter names; values to 6 digits, angles in degrees, lengths in the model's unit.
Overall bounding box: X_Min=-2.07289 X_Len=8.04579 Y_Min=-4.04502 Y_Len=8.09004 Z_Min=-2.28571 Z_Len=3.76071

Fuselage "MainBody"
  location (X Y Z) 0 0 0, rotation 0 0 0
  bounding box size 6.50001 2.00007 2.50001
  Design: Length=4
  cross sections:
    n  XLocPercent  YLocPercent  ZLocPercent  shape
    0  0            0            0            super ellipse Super_Height=2.5 Super_M=2.5 Super_MaxWidthLoc=-0.5 Super_N=2.5 Super_Width=2
    1  0.5          0            0            as above
    2  1            0            0            as above

Custom "FrontL", child of "MainBody"
  location (X Y Z) 0 -2 1.25, rotation 0 90 0
  bounding box size 4.14579 4.09004 0.45
  Design: Camber=0 CamberLoc=0.2 Chord=0.45 Height=4 InvertFlag=0 Shape=0 ThickChord=0.2 Width=4
  custom script Duct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

Propeller "PropGeom", child of "FrontL"
  location (X Y Z) 0 -2 1.4, rotation 0 90 0; relative location -0.15 0 0, rotation 0 0 0
  bounding box size 1.90342 1.90342 0.0944242
  Design: Diameter=1.9 NumBlade=4 Beta34=20 UseBeta34Flag=1 Feather=0 Rotate=0 Precone=0 ReverseFlag=0 FoldAngle=0 PropMode=0 AF=151.538 CLi=0.538798 Chord=0.177656 Solidity=0.226199 ConstructXoC=0.5 FeatherAxisXoC=0.5 FeatherOffsetXoC=0
  cross sections:
    n  RadiusFrac  shape
    0  0.2         ellipse Ellipse_Height=0.038 Ellipse_Width=0.076
    1  0.4         NACA 16-series Chord=0.157938 IdealCl=0.7 ThickChord=0.144074
    2  1           NACA 16-series Chord=0.1235 IdealCl=0.2 ThickChord=0.03
  Chord along r/R (cubic Bezier): 0.2: 0.08, 0.333333: 0.15, 0.466667: 0.2, 0.6: 0.2, 0.716667: 0.2, 0.833333: 0.2, 0.95: 0.2, 0.966667: 0.2, 0.983333: 0.2, 1: 0.13
  Twist along r/R (PCHIP): 0.2: 46.75, 0.75: 20, 1: 13
  Thick along r/R (cubic Bezier): 0.2: 0.5, 0.233333: 0.3, 0.266667: 0.225, 0.3: 0.2, 0.4: 0.125, 0.5: 0.115, 0.6: 0.1, 0.733333: 0.075, 0.866667: 0.055, 1: 0.03
  CLI along r/R (cubic Bezier): 0.2: 0, 0.266667: 0.7, 0.333333: 0.7, 0.4: 0.7, 0.466667: 0.7, 0.533333: 0.7, 0.6: 0.7, 0.733333: 0.7, 0.866667: 0.7, 1: 0.2

Propeller "PropGeom", child of "FrontL"
  location (X Y Z) 0 -2 1.1, rotation 0 90 0; relative location 0.15 0 0, rotation 0 0 0
  bounding box size 1.43901 1.43901 0.0944242
  Design: Diameter=1.9 NumBlade=4 Beta34=20 UseBeta34Flag=1 Feather=0 Rotate=45 Precone=0 ReverseFlag=1 FoldAngle=0 PropMode=0 AF=151.538 CLi=0.538798 Chord=0.177656 Solidity=0.226199 ConstructXoC=0.5 FeatherAxisXoC=0.5 FeatherOffsetXoC=0
  cross sections:
    n  RadiusFrac  shape
    0  0.2         ellipse Ellipse_Height=0.038 Ellipse_Width=0.076
    1  0.4         NACA 16-series Chord=0.157938 IdealCl=0.7 ThickChord=0.144074
    2  1           NACA 16-series Chord=0.1235 IdealCl=0.2 ThickChord=0.03
  blade curves as in "PropGeom"

Custom "FrontR", child of "MainBody"
  location (X Y Z) 0 2 1.25, rotation 0 90 0
  bounding box size 4.14579 4.09004 0.45
  Design: Camber=0 CamberLoc=0.2 Chord=0.45 Height=4 InvertFlag=0 Shape=0 ThickChord=0.2 Width=4
  custom script Duct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

Propeller "PropGeom", child of "FrontR"
  location (X Y Z) 0 2 1.4, rotation 0 90 0; relative location -0.15 0 0, rotation 0 0 0
  bounding box size 1.90342 1.90342 0.0944242
  Design: Diameter=1.9 NumBlade=4 Beta34=20 UseBeta34Flag=1 Feather=0 Rotate=0 Precone=0 ReverseFlag=1 FoldAngle=0 PropMode=0 AF=151.538 CLi=0.538798 Chord=0.177656 Solidity=0.226199 ConstructXoC=0.5 FeatherAxisXoC=0.5 FeatherOffsetXoC=0
  cross sections:
    n  RadiusFrac  shape
    0  0.2         ellipse Ellipse_Height=0.038 Ellipse_Width=0.076
    1  0.4         NACA 16-series Chord=0.157938 IdealCl=0.7 ThickChord=0.144074
    2  1           NACA 16-series Chord=0.1235 IdealCl=0.2 ThickChord=0.03
  blade curves as in "PropGeom"

Propeller "PropGeom", child of "FrontR"
  location (X Y Z) 0 2 1.1, rotation 0 90 0; relative location 0.15 0 0, rotation 0 0 0
  bounding box size 1.43901 1.43901 0.0944242
  Design: Diameter=1.9 NumBlade=4 Beta34=20 UseBeta34Flag=1 Feather=0 Rotate=45 Precone=0 ReverseFlag=0 FoldAngle=0 PropMode=0 AF=151.538 CLi=0.538798 Chord=0.177656 Solidity=0.226199 ConstructXoC=0.5 FeatherAxisXoC=0.5 FeatherOffsetXoC=0
  cross sections:
    n  RadiusFrac  shape
    0  0.2         ellipse Ellipse_Height=0.038 Ellipse_Width=0.076
    1  0.4         NACA 16-series Chord=0.157938 IdealCl=0.7 ThickChord=0.144074
    2  1           NACA 16-series Chord=0.1235 IdealCl=0.2 ThickChord=0.03
  blade curves as in "PropGeom"

Custom "BackL", child of "MainBody"
  location (X Y Z) 3.9 -2 1.25, rotation 0 90 0
  bounding box size 4.14579 4.09004 0.45
  Design: Camber=0 CamberLoc=0.2 Chord=0.45 Height=4 InvertFlag=0 Shape=0 ThickChord=0.2 Width=4
  custom script Duct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

Propeller "PropGeom", child of "BackL"
  location (X Y Z) 3.9 -2 1.4, rotation 0 90 0; relative location -0.15 0 0, rotation 0 0 0
  bounding box size 1.90342 1.90342 0.0944242
  Design: Diameter=1.9 NumBlade=4 Beta34=20 UseBeta34Flag=1 Feather=0 Rotate=0 Precone=0 ReverseFlag=1 FoldAngle=0 PropMode=0 AF=151.538 CLi=0.538798 Chord=0.177656 Solidity=0.226199 ConstructXoC=0.5 FeatherAxisXoC=0.5 FeatherOffsetXoC=0
  cross sections:
    n  RadiusFrac  shape
    0  0.2         ellipse Ellipse_Height=0.038 Ellipse_Width=0.076
    1  0.4         NACA 16-series Chord=0.157938 IdealCl=0.7 ThickChord=0.144074
    2  1           NACA 16-series Chord=0.1235 IdealCl=0.2 ThickChord=0.03
  blade curves as in "PropGeom"

Propeller "PropGeom", child of "BackL"
  location (X Y Z) 3.9 -2 1.1, rotation 0 90 0; relative location 0.15 0 0, rotation 0 0 0
  bounding box size 1.43901 1.43901 0.0944242
  Design: Diameter=1.9 NumBlade=4 Beta34=20 UseBeta34Flag=1 Feather=0 Rotate=45 Precone=0 ReverseFlag=0 FoldAngle=0 PropMode=0 AF=151.538 CLi=0.538798 Chord=0.177656 Solidity=0.226199 ConstructXoC=0.5 FeatherAxisXoC=0.5 FeatherOffsetXoC=0
  cross sections:
    n  RadiusFrac  shape
    0  0.2         ellipse Ellipse_Height=0.038 Ellipse_Width=0.076
    1  0.4         NACA 16-series Chord=0.157938 IdealCl=0.7 ThickChord=0.144074
    2  1           NACA 16-series Chord=0.1235 IdealCl=0.2 ThickChord=0.03
  blade curves as in "PropGeom"

Custom "BackR", child of "MainBody"
  location (X Y Z) 3.9 2 1.25, rotation 0 90 0
  bounding box size 4.14579 4.09004 0.45
  Design: Camber=0 CamberLoc=0.2 Chord=0.45 Height=4 InvertFlag=0 Shape=0 ThickChord=0.2 Width=4
  custom script Duct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

Propeller "PropGeom", child of "BackR"
  location (X Y Z) 3.9 2 1.1, rotation 0 90 0; relative location 0.15 0 0, rotation 0 0 0
  bounding box size 1.90342 1.90342 0.0944242
  Design: Diameter=1.9 NumBlade=4 Beta34=20 UseBeta34Flag=1 Feather=0 Rotate=0 Precone=0 ReverseFlag=0 FoldAngle=0 PropMode=0 AF=151.538 CLi=0.538798 Chord=0.177656 Solidity=0.226199 ConstructXoC=0.5 FeatherAxisXoC=0.5 FeatherOffsetXoC=0
  cross sections:
    n  RadiusFrac  shape
    0  0.2         ellipse Ellipse_Height=0.038 Ellipse_Width=0.076
    1  0.4         NACA 16-series Chord=0.157938 IdealCl=0.7 ThickChord=0.144074
    2  1           NACA 16-series Chord=0.1235 IdealCl=0.2 ThickChord=0.03
  blade curves as in "PropGeom"

Propeller "PropGeom", child of "BackR"
  location (X Y Z) 3.9 2 1.4, rotation 0 90 0; relative location -0.15 0 0, rotation 0 0 0
  bounding box size 1.43901 1.43901 0.0944242
  Design: Diameter=1.9 NumBlade=4 Beta34=20 UseBeta34Flag=1 Feather=0 Rotate=45 Precone=0 ReverseFlag=1 FoldAngle=0 PropMode=0 AF=151.538 CLi=0.538798 Chord=0.177656 Solidity=0.226199 ConstructXoC=0.5 FeatherAxisXoC=0.5 FeatherOffsetXoC=0
  cross sections:
    n  RadiusFrac  shape
    0  0.2         ellipse Ellipse_Height=0.038 Ellipse_Width=0.076
    1  0.4         NACA 16-series Chord=0.157938 IdealCl=0.7 ThickChord=0.144074
    2  1           NACA 16-series Chord=0.1235 IdealCl=0.2 ThickChord=0.03
  blade curves as in "PropGeom"

Wing "WingGeom", child of "MainBody"
  location (X Y Z) 1.5 0.7 1, rotation 0 15 0
  symmetric about XZ
  bounding box size 2.08207 5.4 0.58916
  totals: TotalSpan=4 TotalProjectedSpan=4 TotalChord=1.5 TotalArea=6 TotalAR=2.66667
  root: chord 2, twist 0, NACA 4-series Camber=0 CamberLoc=0.2 ThickChord=0.1
  sections:
    n  Span  Root_Chord  Tip_Chord  Area  Sweep  Sweep_Location  Dihedral  Twist  Twist_Location  tip airfoil
    1  2     2           1          3     30     0               0         0      0.25            as above

Custom "PassengerSeating", child of "MainBody"
  location (X Y Z) 2.65 0.364286 -0.3, rotation 0 0 -180
  bounding box size 1.97685 1.2 1.30447
  Design: BackAngle=25 BackHeight=1 BackThick=0.1 SeatHeight=0.35 SeatLength=0.5 Width=0.5
  Layout: AisleWidth=0.001 NumLeft=0 NumMiddle=2 NumRight=0 NumRow=2 SeatGap=0.2 SeatPitch=1
  custom script SeatGroup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

Human "Passenger", child of "PassengerSeating"
  location (X Y Z) 2.3 -0.335714 0.05, rotation 0 0 -180; relative location 0.35 0.7 0.35, rotation 0 0 0
  mass: Density=1110.87 Shell_Flag=0 Mass_Area=1 Mass_Prior=0
  Anthropometric: Age=30 AutoDensity=1 BMI=27.7 BMI_pct=0.5 GenderFlag=0 LenUnit=2 Mass=85.4139 MassUnit=1 SitFrac=0.51 Stature=1.756 Stature_pct=0.5 Volume=0.076889

Human "Passenger", child of "PassengerSeating"
  location (X Y Z) 2.3 0.364286 0.05, rotation 0 0 -180; relative location 0.35 0 0.35, rotation 0 0 0
  mass: Density=1110.87 Shell_Flag=0 Mass_Area=1 Mass_Prior=0
  Anthropometric: Age=30 AutoDensity=1 BMI=27.7 BMI_pct=0.5 GenderFlag=0 LenUnit=2 Mass=85.4139 MassUnit=1 SitFrac=0.51 Stature=1.756 Stature_pct=0.5 Volume=0.076889

Human "Passenger", child of "PassengerSeating"
  location (X Y Z) 1.3 -0.335714 0.05, rotation 0 0 -180; relative location 1.35 0.7 0.35, rotation 0 0 0
  mass: Density=1110.87 Shell_Flag=0 Mass_Area=1 Mass_Prior=0
  Anthropometric: Age=30 AutoDensity=1 BMI=27.7 BMI_pct=0.5 GenderFlag=0 LenUnit=2 Mass=85.4139 MassUnit=1 SitFrac=0.51 Stature=1.756 Stature_pct=0.5 Volume=0.076889

Human "Passenger", child of "PassengerSeating"
  location (X Y Z) 1.3 0.364286 0.05, rotation 0 0 -180; relative location 1.35 0 0.35, rotation 0 0 0
  mass: Density=1110.87 Shell_Flag=0 Mass_Area=1 Mass_Prior=0
  Anthropometric: Age=30 AutoDensity=1 BMI=27.7 BMI_pct=0.5 GenderFlag=0 LenUnit=2 Mass=85.4139 MassUnit=1 SitFrac=0.51 Stature=1.756 Stature_pct=0.5 Volume=0.076889

Custom "PilotSeat", child of "MainBody"
  location (X Y Z) 0 0 -0.75, rotation 0 -90 0
  bounding box size 0.55 0.5 1.4
  Design: BackAngle=0 BackHeight=1 BackThick=0.1 SeatHeight=0.35 SeatLength=0.5 Width=0.5
  custom script Seat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

Human "HumanGeom", child of "PilotSeat"
  location (X Y Z) 0 0 -0.15, rotation 0 0 0; relative location 0 0 0.6, rotation 0 0 0
  mass: Density=1110.87 Shell_Flag=0 Mass_Area=1 Mass_Prior=0
  Anthropometric: Age=30 AutoDensity=1 BMI=27.7 BMI_pct=0.5 GenderFlag=0 LenUnit=2 Mass=85.4139 MassUnit=1 SitFrac=0.51 Stature=1.756 Stature_pct=0.5 Volume=0.076889

Conformal "Parachute", child of "MainBody"
  location (X Y Z) 0 0 0, rotation 0 0 0
  bounding box size 0.76768 0.835638 0.107258
  Design: ChordTrimFlag=0 ChordTrimMax=0.9 ChordTrimMin=0.1 Offset=0.1 UTrimFlag=1 UTrimMax=0.5 UTrimMin=0.3 V1TrimBegin=0.8 V1TrimEnd=0.7 V1TrimFlag=1 V2TrimBegin=0.25 V2TrimEnd=0.75 V2TrimFlag=0

Stack "H2Tank", child of "MainBody"
  location (X Y Z) 0 -0.35 -1, rotation 0 0 0
  bounding box size 3.5 0.5 0.5
  cross sections:
    n  XDelta  YDelta  ZDelta  shape
    0  0       0       0       point
    1  0.25    0       0       circle Circle_Diameter=0.5
    2  2       0       0       as above
    3  1       0       0       as above
    4  0.25    0       0       point

Stack "H2Tank", child of "MainBody"
  location (X Y Z) 0 0.35 -1, rotation 0 0 0
  bounding box size 3.5 0.5 0.5
  cross sections:
    n  XDelta  YDelta  ZDelta  shape
    0  0       0       0       point
    1  0.25    0       0       circle Circle_Diameter=0.5
    2  2       0       0       as above
    3  1       0       0       as above
    4  0.25    0       0       point

Custom "Cone"
  location (X Y Z) 4.5 -0.96 -2.28571, rotation 0 -90 0
  bounding box size 0.717156 0.717156 0.358578
  Design: Diameter=0.717156 Height=0.358578
  custom script Cone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

Custom "Cone"
  location (X Y Z) 4.5 0.96 -2.2856, rotation 0 -90 0
  bounding box size 0.71744 0.71744 0.35872
  Design: Diameter=0.71744 Height=0.35872
  custom script Cone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

Custom "Cone", child of "Cone"
  location (X Y Z) 0.666667 -0.96 -2.28571, rotation 0 -90 0
  bounding box size 0.717156 0.717156 0.358578
  Design: Diameter=0.717156 Height=0.358578
  custom script Cone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

Custom "Cone", child of "Cone"
  location (X Y Z) 0.666667 0.96 -2.2856, rotation 0 -90 0
  bounding box size 0.71744 0.71744 0.35872
  Design: Diameter=0.71744 Height=0.35872
  custom script Cone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

Advanced link "Unnamed_Link"


VSPAERO settings: Sref=6 bref=4 cref=1.5 Xcg=2.4454 Ycg=7.61515e-05 Zcg=-0.050662 AlphaStart=-5 AlphaEnd=20 AlphaNpts=25 BetaStart=0 BetaEnd=0 BetaNpts=1 MachStart=0 MachEnd=0 MachNpts=1 ReCref=1e+07 Vinf=100 Rho=0.002377
