OpenVSP model (file version 5), 12 components.
Geometry view with OpenVSP parameter names; values to 6 digits, angles in degrees, lengths in the model's unit.
Overall bounding box: X_Min=-1.875 X_Len=7.75001 Y_Min=-3.14502 Y_Len=6.29004 Z_Min=-1.34036 Z_Len=2.81536

Fuselage "MainBody"
  location (X Y Z) 0 0 0, rotation 0 0 0
  bounding box size 7.75001 2.00007 2.68071
  Design: Length=4
  cross sections:
    n  XLocPercent  YLocPercent  ZLocPercent  shape
    0  0            0            0            super ellipse Super_Height=2.5 Super_M=2.5 Super_MaxWidthLoc=-0.5 Super_N=2.5 Super_Width=2
    1  1            0            0            as above

Custom "FrontL", child of "MainBody"
  location (X Y Z) 0 -1.8 1.25, rotation 0 90 0
  bounding box size 2.62534 2.59004 0.45
  Design: Camber=0 CamberLoc=0.2 Chord=0.45 Height=2.5 InvertFlag=0 Shape=0 ThickChord=0.2 Width=2.5
  custom script Duct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

Propeller "PropGeom", child of "FrontL"
  location (X Y Z) 0 -1.8 1.25, rotation 0 90 0; relative location 0 0 0, rotation 0 0 0
  bounding box size 2.10079 1.83361 0.168512
  Design: Diameter=2.35 NumBlade=3 Beta34=38.22 UseBeta34Flag=1 Feather=18.22 Rotate=0 Precone=0 ReverseFlag=0 FoldAngle=0 PropMode=0 AF=152.054 CLi=0.540085 Chord=0.17586 Solidity=0.167934 ConstructXoC=0.5 FeatherAxisXoC=0.5 FeatherOffsetXoC=0
  cross sections:
    n  RadiusFrac  shape
    0  0.121739    ellipse Ellipse_Height=0.047 Ellipse_Width=0.094
    1  0.4         NACA 16-series Chord=0.206756 IdealCl=0.7 ThickChord=0.144074
    2  1           NACA 16-series Chord=0.15275 IdealCl=0.2 ThickChord=0.03
  Chord along r/R (cubic Bezier): 0.121739: 0.08, 0.281159: 0.15, 0.44058: 0.2, 0.6: 0.2, 0.716667: 0.2, 0.833333: 0.2, 0.95: 0.2, 0.966667: 0.2, 0.983333: 0.2, 1: 0.13
  Twist along r/R (PCHIP): 0.121739: 46.75, 0.75: 20, 1: 13
  Thick along r/R (cubic Bezier): 0.121739: 0.5, 0.181159: 0.3, 0.24058: 0.225, 0.3: 0.2, 0.4: 0.125, 0.5: 0.115, 0.6: 0.1, 0.733333: 0.075, 0.866667: 0.055, 1: 0.03
  CLI along r/R (cubic Bezier): 0.121739: 0, 0.214493: 0.7, 0.307246: 0.7, 0.4: 0.7, 0.466667: 0.7, 0.533333: 0.7, 0.6: 0.7, 0.733333: 0.7, 0.866667: 0.7, 1: 0.2

Custom "FrontR", child of "MainBody"
  location (X Y Z) 0 1.8 1.25, rotation 0 90 0
  bounding box size 2.62534 2.59004 0.45
  Design: Camber=0 CamberLoc=0.2 Chord=0.45 Height=2.5 InvertFlag=0 Shape=0 ThickChord=0.2 Width=2.5
  custom script Duct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

Propeller "PropGeom", child of "FrontR"
  location (X Y Z) 0 1.8 1.25, rotation 0 90 0; relative location 0 0 0, rotation 0 0 0
  bounding box size 2.10079 1.83361 0.168512
  Design: Diameter=2.35 NumBlade=3 Beta34=38.22 UseBeta34Flag=1 Feather=18.22 Rotate=0 Precone=0 ReverseFlag=0 FoldAngle=0 PropMode=0 AF=152.054 CLi=0.540085 Chord=0.17586 Solidity=0.167934 ConstructXoC=0.5 FeatherAxisXoC=0.5 FeatherOffsetXoC=0
  cross sections:
    n  RadiusFrac  shape
    0  0.121739    ellipse Ellipse_Height=0.047 Ellipse_Width=0.094
    1  0.4         NACA 16-series Chord=0.206756 IdealCl=0.7 ThickChord=0.144074
    2  1           NACA 16-series Chord=0.15275 IdealCl=0.2 ThickChord=0.03
  blade curves as in "PropGeom"

Custom "BackL", child of "MainBody"
  location (X Y Z) 3.9 -1.85 1.25, rotation 0 90 0
  bounding box size 2.62534 2.59004 0.45
  Design: Camber=0 CamberLoc=0.2 Chord=0.45 Height=2.5 InvertFlag=0 Shape=0 ThickChord=0.2 Width=2.5
  custom script Duct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

Propeller "PropGeom", child of "BackL"
  location (X Y Z) 3.9 -1.85 1.25, rotation 0 90 0; relative location 0 0 0, rotation 0 0 0
  bounding box size 2.10079 1.83361 0.168512
  Design: Diameter=2.35 NumBlade=3 Beta34=38.22 UseBeta34Flag=1 Feather=18.22 Rotate=0 Precone=0 ReverseFlag=0 FoldAngle=0 PropMode=0 AF=152.054 CLi=0.540085 Chord=0.17586 Solidity=0.167934 ConstructXoC=0.5 FeatherAxisXoC=0.5 FeatherOffsetXoC=0
  cross sections:
    n  RadiusFrac  shape
    0  0.121739    ellipse Ellipse_Height=0.047 Ellipse_Width=0.094
    1  0.4         NACA 16-series Chord=0.206756 IdealCl=0.7 ThickChord=0.144074
    2  1           NACA 16-series Chord=0.15275 IdealCl=0.2 ThickChord=0.03
  blade curves as in "PropGeom"

Custom "BackR", child of "MainBody"
  location (X Y Z) 3.9 1.85 1.25, rotation 0 90 0
  bounding box size 2.62534 2.59004 0.45
  Design: Camber=0 CamberLoc=0.2 Chord=0.45 Height=2.5 InvertFlag=0 Shape=0 ThickChord=0.2 Width=2.5
  custom script Duct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

Propeller "PropGeom", child of "BackR"
  location (X Y Z) 3.9 1.85 1.25, rotation 0 90 0; relative location 0 0 0, rotation 0 0 0
  bounding box size 2.10079 1.83361 0.168512
  Design: Diameter=2.35 NumBlade=3 Beta34=38.22 UseBeta34Flag=1 Feather=18.22 Rotate=0 Precone=0 ReverseFlag=0 FoldAngle=0 PropMode=0 AF=152.054 CLi=0.540085 Chord=0.17586 Solidity=0.167934 ConstructXoC=0.5 FeatherAxisXoC=0.5 FeatherOffsetXoC=0
  cross sections:
    n  RadiusFrac  shape
    0  0.121739    ellipse Ellipse_Height=0.047 Ellipse_Width=0.094
    1  0.4         NACA 16-series Chord=0.206756 IdealCl=0.7 ThickChord=0.144074
    2  1           NACA 16-series Chord=0.15275 IdealCl=0.2 ThickChord=0.03
  blade curves as in "PropGeom"

Wing "Sturt FWD"
  location (X Y Z) -0.26 0 1.2, rotation 0 0 0
  symmetric about XZ
  bounding box size 0.426227 1.158 0.0350203
  totals: TotalSpan=1.158 TotalProjectedSpan=1.158 TotalChord=0.35 TotalArea=0.4053 TotalAR=3.30857
  root: chord 0.35, twist 0, NACA 4-series Camber=0 CamberLoc=0.2 ThickChord=0.1
  sections:
    n  Span   Root_Chord  Tip_Chord  Area     Sweep  Sweep_Location  Dihedral  Twist  Twist_Location  tip airfoil
    1  0.579  0.35        0.35       0.20265  7.5    0               0         0      0.25            as above

Wing "Sturt AFT", child of "Sturt FWD"
  location (X Y Z) 3.65 0 1.2, rotation 0 0 0
  symmetric about XZ
  bounding box size 0.426358 1.16 0.0350203
  totals: TotalSpan=1.16 TotalProjectedSpan=1.16 TotalChord=0.35 TotalArea=0.406 TotalAR=3.31429
  root: chord 0.35, twist 0, NACA 4-series Camber=0 CamberLoc=0.2 ThickChord=0.1
  sections:
    n  Span  Root_Chord  Tip_Chord  Area   Sweep  Sweep_Location  Dihedral  Twist  Twist_Location  tip airfoil
    1  0.58  0.35        0.35       0.203  7.5    0               0         0      0.25            as above

Mesh "MeshGeom"
  location (X Y Z) 0 0 0, rotation 0 0 0
  triangle mesh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

Advanced link "Unnamed_Link"


VSPAERO settings: Sref=0.4053 bref=1.158 cref=0.35 Xcg=0 Ycg=0 Zcg=0 AlphaStart=10 AlphaEnd=90 AlphaNpts=1 BetaStart=0 BetaEnd=0 BetaNpts=1 MachStart=0 MachEnd=0 MachNpts=1 ReCref=1e+07 Vinf=100 Rho=1
